<?xml version="1.0"?>
<!-- Generated by Aero-Matic v 1.1

Inputs:
horsepower: 2200.0
pitch: variable
max engine rpm: 2800
prop diameter (ft): 16.6666666667

Outputs:
max prop rpm: 1125.78
gear ratio:    2.49
Cp0: 0.059899
Ct0: 0.139566
static thrust (lbs): 9015.51
-->

<propeller name="prop_200in4v.xml">
  <ixx> 356.38 </ixx>
  <diameter unit="IN"> 200.0 </diameter>
  <numblades> 3 </numblades><!-- aeromatic default, good for now-->
  <gearratio>  2.49 </gearratio>
  <p_factor>  15.80 </p_factor>
  <minpitch> 12 </minpitch>
  <maxpitch> 45 </maxpitch>
  <minrpm>    957 </minrpm>
  <maxrpm>   1526 </maxrpm>

  <!-- thrust coefficient as a function of advance ratio and blade angle -->
  <table name="C_THRUST" type="internal">
      <tableData>
      -10        0         15        25        35        45        55        65       90
      -0.2      -0.0681    0.0384    0.1396    0.1710    0.1884    0.1989    0.1832    0.1570   0.0000
       0.0      -0.1012    0.0000    0.1396    0.1710    0.1884    0.2007    0.1876    0.1570   0.0000
       0.2      -0.1135   -0.0349    0.1204    0.1675    0.1858    0.2007    0.1876    0.1570   0.0000
       0.4      -0.1135   -0.0811    0.0907    0.1658    0.1823    0.1989    0.1876    0.1570   0.0000
       0.6      -0.1135   -0.1135    0.0480    0.1492    0.1745    0.1937    0.1849    0.1570   0.0000
       0.8      -0.1135   -0.1135    0.0027    0.1117    0.1693    0.1867    0.1849    0.1570   0.0000
       1.0      -0.1135   -0.1135   -0.0454    0.0681    0.1623    0.1771    0.1832    0.1570   0.0000
       1.2      -0.1135   -0.1135   -0.0934    0.0209    0.1334    0.1710    0.1832    0.1570   0.0000
       1.4      -0.1135   -0.1135   -0.1135   -0.0306    0.0960    0.1683    0.1798    0.1570   0.0000
       1.6      -0.1135   -0.1135   -0.1135   -0.0776    0.0523    0.1623    0.1763    0.1570   0.0000
       1.8      -0.1135   -0.1135   -0.1135   -0.1135    0.0088    0.1396    0.1710    0.1570   0.0000
       2.0      -0.1135   -0.1135   -0.1135   -0.1135   -0.0349    0.1090    0.1703    0.1570   0.0000
       2.2      -0.1135   -0.1135   -0.1135   -0.1135   -0.0786    0.0786    0.1675    0.1570   0.0000
       2.4      -0.1135   -0.1135   -0.1135   -0.1135   -0.1135    0.0419    0.1368    0.1570   0.0000
       2.6      -0.1135   -0.1135   -0.1135   -0.1135   -0.1135    0.0053    0.0865    0.1396   0.0000
       2.8      -0.1135   -0.1135   -0.1135   -0.1135   -0.1135   -0.0314    0.0567    0.1135   0.0000
       3.0      -0.1135   -0.1135   -0.1135   -0.1135   -0.1135   -0.0681    0.0297    0.0872   0.0000
       3.2      -0.1135   -0.1135   -0.1135   -0.1135   -0.1135   -0.1047    0.0027    0.0611   0.0000
       3.4      -0.1135   -0.1135   -0.1135   -0.1135   -0.1135   -0.1135   -0.0244    0.0349   0.0000
       3.6      -0.1135   -0.1135   -0.1135   -0.1135   -0.1135   -0.1135   -0.0515    0.0088   0.0000
       3.8      -0.1135   -0.1135   -0.1135   -0.1135   -0.1135   -0.1135   -0.0786   -0.0174   0.0000
       4.0      -0.1135   -0.1135   -0.1135   -0.1135   -0.1135   -0.1135   -0.1055   -0.0437   0.0000
       6.0      -0.1135   -0.1135   -0.1135   -0.1135   -0.1135   -0.1135   -0.1135   -0.1135   0.0000
      </tableData>
	<!-- tableData>
      -10        0         15        25        35        45        55        65       90
      -0.2     -0.1685    0.2513    0.3501    0.3739    0.4427    0.4839    0.4223    0.3189   0.0000
      0.0      -0.2988    0.1000    0.3501    0.3739    0.4427    0.4911    0.4394    0.3189   0.0000
      0.2      -0.3472   -0.0375    0.2747    0.3601    0.4322    0.4911    0.4394    0.3189   0.0000
      0.4      -0.3472   -0.2196    0.1576    0.3535    0.4184    0.4839    0.4394    0.3189   0.0000
      0.6      -0.3472   -0.3472   -0.0292    0.2881    0.3876    0.4636    0.4289    0.3189   0.0000
      0.8      -0.3472   -0.3472   -0.1105    0.1401    0.3673    0.4361    0.4289    0.3189   0.0000
      1.0      -0.3472   -0.3472   -0.2788   -0.0685    0.3398    0.3981    0.4223    0.3189   0.0000
      1.2      -0.3472   -0.3472   -0.4680   -0.1325    0.2259    0.3739    0.4223    0.3189   0.0000
      1.4      -0.3472   -0.3472   -0.5472   -0.2205    0.1785    0.3634    0.4085    0.3189   0.0000
      1.6      -0.3472   -0.3472   -0.5472   -0.4059    0.1063    0.3398    0.3948    0.3189   0.0000
      1.8      -0.3472   -0.3472   -0.5472   -0.5472   -0.0347    0.2501    0.3739    0.3189   0.0000
      2.0      -0.3472   -0.3472   -0.5472   -0.5472   -0.2375    0.1296    0.3711    0.3189   0.0000
      2.2      -0.3472   -0.3472   -0.5472   -0.5472   -0.4097    0.0097    0.3601    0.3189   0.0000
      2.4      -0.3472   -0.3472   -0.5472   -0.5472   -0.5472   -0.0450    0.2391    0.3189   0.0000
      2.6      -0.3472   -0.3472   -0.5472   -0.5472   -0.5472   -0.0209    0.1411    0.2501   0.0000
      2.8      -0.3472   -0.3472   -0.5472   -0.5472   -0.5472   -0.2238    0.0233    0.1472   0.0000
      3.0      -0.3472   -0.3472   -0.5472   -0.5472   -0.5472   -0.3685    0.0172    0.0438   0.0000
      3.2      -0.3472   -0.3472   -0.5472   -0.5472   -0.5472   -0.5126    0.0105   -0.0409   0.0000
      3.4      -0.3472   -0.3472   -0.5472   -0.5472   -0.5472   -0.5472   -0.0963   -0.1375   0.0000
      3.6      -0.3472   -0.3472   -0.5472   -0.5472   -0.5472   -0.5472   -0.2030   -0.2347   0.0000
      3.8      -0.3472   -0.3472   -0.5472   -0.5472   -0.5472   -0.5472   -0.3097   -0.2688   0.0000
      4.0      -0.3472   -0.3472   -0.5472   -0.5472   -0.5472   -0.5472   -0.4159   -0.2722   0.0000
      6.0      -0.3472   -0.3472   -0.5472   -0.5472   -0.5472   -0.5472   -0.4472   -0.2472   0.0000
    </tableData -->
  </table>

  <!-- power coefficient as a function of advance ratio and blade angle -->
  <table name="C_POWER" type="internal">
    <tableData>
     -10        0        15        25        35        45        55        65       90
     -0.2      0.0100   0.0199    0.0699    0.1587    0.2737    0.3893    0.4492    0.4972   0.4972
      0.0      0.0400   0.0100    0.0599    0.1480    0.2618    0.3893    0.4510    0.4972   0.4972
      0.2      0.0569   0.0160    0.0579    0.1378    0.2504    0.3893    0.4510    0.4972   0.4972
      0.4      0.0767   0.0349    0.0499    0.1270    0.2378    0.3893    0.4510    0.4972   0.4972
      0.6      0.0940   0.0529    0.0329    0.1180    0.2228    0.3816    0.4492    0.4972   0.4972
      0.8      0.1108   0.0709    0.0100    0.1000    0.2096    0.3642    0.4492    0.4972   0.4972
      1.0      0.1276   0.0881    0.0100    0.0701    0.1977    0.3456    0.4474    0.4972   0.4972
      1.2      0.1450   0.0704   -0.0329    0.0270    0.1749    0.3312    0.4445    0.4972   0.4972
      1.4      0.1617   0.1216   -0.0497   -0.0199    0.1348    0.3265    0.4391    0.4972   0.4972
      1.6      0.1785   0.1390   -0.0581   -0.0599    0.0851    0.3175    0.4295    0.4792   0.4972
      1.8      0.1959   0.1557   -0.0599   -0.1000    0.0250    0.2815    0.4163    0.4690   0.4972
      2.0      0.2126   0.1725   -0.0767   -0.1396   -0.0299    0.2396    0.3965    0.4594   0.4972
      2.2      0.2294   0.1899   -0.0940   -0.1797   -0.0898    0.1947    0.3846    0.4391   0.4972
      2.4      0.2468   0.2067   -0.1108   -0.2198   -0.1497    0.1390    0.3732    0.4295   0.4972
      2.6      0.2636   0.2234   -0.1276   -0.2594   -0.1899    0.0581    0.3642    0.4145   0.4972
      2.8      0.2803   0.2408   -0.1450   -0.2995   -0.2276   -0.0198    0.3564    0.4091   0.4972
      3.0      0.2977   0.2576   -0.1617   -0.3396   -0.2695   -0.0898    0.3444    0.4091   0.4972
      3.2      0.3145   0.2743   -0.1785   -0.3792   -0.3097   -0.1599    0.3223    0.3995   0.4972
      3.4      0.3312   0.2917   -0.1959   -0.4193   -0.3492   -0.2294    0.2498    0.3893   0.4972
      3.6      0.3486   0.3085   -0.2126   -0.4594   -0.3893   -0.2995    0.1755    0.3792   0.4972
      3.8      0.3654   0.3253   -0.2294   -0.4972   -0.4295   -0.3696    0.0976    0.3672   0.4972
      4.0      0.3822   0.3426   -0.2468   -0.4972   -0.4972   -0.4391    0.0198    0.3396   0.4972
      6.0      0.4972   0.4972   -0.4972   -0.4972   -0.4972   -0.4972   -0.4972   -0.2995   0.4972
    </tableData>
  </table>

  <!-- thrust effects of helical tip Mach -->
  <table name="CT_MACH" type="internal">
    <tableData>
      0.85   1.0
      1.05   0.8
    </tableData>
  </table>

  <!-- power-required effects of helical tip Mach -->
  <table name="CP_MACH" type="internal">
    <tableData>
      0.85   1.0
      1.05   1.8
      2.00   1.4
    </tableData>
  </table>

</propeller>
